*INCLUDE, INPUT=PARAMETERS.inp
*********************************************************************
** Import prestretched configuration from Step 2
** Only deformed geometry is imported and stress is not imported
** Stress is not imported as we are only interested in the active stress
** arising from neural stimulation
*********************************************************************
*IMPORT, STEP=1, STATE=NO, UPDATE=YES
ALL
*IMPORT ELSET
ALL
*IMPORT NSET
ALL
FACE1
FACE2
FACE3
FACE4
FACE5
FACE6
*********************************************************************
** Material and section (activation handled in UMAT)
*********************************************************************
*Material, name=COLON
*Depvar
3,
*User Material, constants=35, unsymm
<day>, <t_pb>, <tc>, <a_cyto>, <d1_cyto>, <d2_cyto>, <theta_max_0>, <b_hyper>,
<c_hyper>, <K_hyper>, <n_hyper>, <m_macro>, <y1_macro>, <y2_macro>, <gamma_ch>, <gamma_nos>,
<r_ch>, <k_ch>, <ch_ss>, <r_nos>, <k_nos>, <nos_ss>, <k_ex>, <k_in>,
<mu>, <kappa_bulk>, <kappa_fiber>, <alpha_act_ex>, <beta_act_in>, <Rdir1>, <Rdir2>, <Rdir3>,
<Tdir1>, <Tdir2>, <Tdir3>
*Solid Section, elset=ALL, material=COLON, ORIENTATION=CSYS
*Initial Conditions, Type=Solution, User
*********************************************************************
** Step 3: Neural activation (isometric)
** - Stretch is held fixed at the Step-2 preload state
** - Active stress ramps inside the Step-3 UMAT as a function of step time
*********************************************************************
*Step, name=Step-3, nlgeom=YES, inc=1000000
*Static
0.01, 1.0, 1E-6, 1.
*********************************************************************
** Boundary conditions
*********************************************************************
*Boundary
FACE1, 3
FACE3, 2
FACE6, 1
FACE2, 3, 3, 0.0
*********************************************************************
** Output
*********************************************************************
*Restart, write, frequency=1
*Output, field, TIME INTERVAL=0.1
*Node Output
COORD
*Element Output, directions=YES
EVOL, SDV
*Output, field, variable=PRESELECT, TIME INTERVAL=0.1
*Output, history, variable=PRESELECT, TIME INTERVAL=0.1
*NODE OUTPUT,NSET=ALL
U,RF
*Element Output, elset=ALL
SDV, MISES
*End Step
*********************************************************************
